folder simulations: version=37; creator=Apsim 7.9-r4044
  simulation Maize-soybean
    metfile met: filename=C:\Users\femiguez\Dropbox\csm\labs\06_lab\apsim\Iowa C.met
    clock
      start_date = 01/01/2011  # Enter the start date of the simulation
      end_date = 31/12/2012  # Enter the end date of the simulation
    summaryfile
    area paddock
      surfaceom SurfaceOrganicMatter
        PoolName = maize  # Organic Matter pool name
        type = maize  # Organic Matter type
        mass = 1250  # Initial surface residue (kg/ha)
        cnr = 27  # C:N ratio of initial residue
        standing_fraction = 0.0  # Fraction of residue standing
      fertiliser
      folder Manager folder
        manager Sow on a fixed date - maize
          # Sowing criteria
          date = 1-may  # Enter sowing date (dd-mmm)
          # Sowing parameters
          crop = maize  # Enter name of crop to sow
          density = 7.5  # Enter sowing density (plants/m2)
          depth = 50  # Enter sowing depth (mm)
          cultivar = B_110  # Enter cultivar
          class = maize  # Enter crop growth class
          row_spacing = 760  # Enter row spacing (mm)
          on start_of_day:
```
        if (today = date('[date]') then
              [crop] sow plants =[density], sowing_depth = [depth], cultivar = [cultivar], row_spacing = [row_spacing], crop_class = [class]
         endif
```
        manager Sow on a fixed date - soybean
          # Sowing criteria
          date = 15-may  # Enter sowing date (dd-mmm)
          # Sowing parameters
          crop = soybean  # Enter name of crop to sow
          density = 35  # Enter sowing density (plants/m2)
          depth = 50  # Enter sowing depth (mm)
          cultivar = MG_2  # Enter cultivar
          class = plant  # Enter crop growth class
          row_spacing = 500  # Enter row spacing (mm)
          on start_of_day:
          script: same as in Maize-soybean.paddock.Manager folder.Sow on a fixed date - maize
        manager Tillage on fixed date
          # When should tillage be done
          tillage_date = 10-apr  # Enter tillage date (dd-mmm)
          # Tillage application details
          surfaceommodule = SurfaceOrganicMatter  # Module used to apply the tillage
          tillage_type = disc
          tillage_depth = 110  # User_defined depth of seedbed preparation (mm)
          tillage_f_incorp = 0.4  # User_defined fraction of surface residues to incorporate (0-1)
          on start_of_day:
```
         if (today = date('[tillage_date]') then
            if ('[tillage_type]' = 'user_defined') then
                '[surfaceommodule]' tillage type = [tillage_type], f_incorp = [tillage_f_incorp] (), tillage_depth = [tillage_depth]
            else
                '[surfaceommodule]' tillage type = [tillage_type]
            endif
            ready_to_till_pre_sow = 0
            till_day_pre_sow = 0
         endif
```
        manager Fertilise on fixed date
          # When should fertiliser be applied
          fert_date = 5-may  # Enter fertiliser date (dd-mmm)
          fert_criteria = 1000  # Don't add fertiliser if N in top 2 layers exceeds (kg/ha)
          # Fertiliser application details
          fertmodule = fertiliser  # Module used to apply the fertiliser
          fert_amount = 150  # Amount of fertiliser to apply (kg/ha)
          fert_type = urea_N  # Fertiliser type
          on start_of_day:
```
         if (today = date('[fert_date]') then
            N_topsoil = no3(1) + nh4(1) + no3(2) + nh4(2)
            if (N_topsoil < [fert_criteria]) then
               [fertmodule] apply amount = [fert_amount] (kg/ha), depth = 50 (mm), type = [fert_type] ()
            endif
         endif
```
        manager UnitConversion
          on start_of_day:
```
corn_buac   = maize_yield * 0.0159/0.85  ! corn yield in bushels/acre @15% moisture
```
        manager Harvesting rule - maize
          # Harvesting criteria
          crop = maize  # Enter name of crop to harvest when ripe
          on end_of_day:
```
           if ('[crop]' = 'cotton') then
              if ([crop].ozcot_status > 0) then
                  [crop] harvest
              endif
           elseif ([crop].StageName = 'harvest_ripe' or [crop].plant_status = 'dead') then
              [crop]  harvest
              [crop]  end_crop
           endif
```
        manager Harvesting rule - soybean
          # Harvesting criteria
          crop = soybean  # Enter name of crop to harvest when ripe
          on end_of_day:
```
           if ([crop].StageName = 'harvest_ripe' or [crop].plant_status = 'dead') then
              [crop]  harvest
              [crop]  end_crop
           endif
```
        manager Rotations
          # Fallow options
          SummerFallowName = sf  # Enter summer fallow name
          SummerFallowEndDate = 15-nov  # Enter summer fallow END date (dd-mmm)
          WinterFallowName = wf  # Enter winter fallow name
          WinterFallowEndDate = 23-mar  # Enter winter fallow END date (dd-mmm)
          # Crop rotation sequence
          crop1 = maize  # Enter 1st crop
          crop2 = soybean  # Enter 2nd crop
          crop3 = nil  # Enter 3rd crop
          crop4 = nil  # Enter 4th crop
          crop5 = nil  # Enter 5th crop
          crop6 = nil  # Enter 6th crop
          crop7 = nil  # Enter 7th crop
          crop8 = nil  # Enter 8th crop
          crop9 = nil  # Enter 9th crop
          crop10 = nil  # Enter 10th crop
          crop11 = nil  # Enter 11th crop
          crop12 = nil  # Enter 12th crop
          crop13 = nil  # Enter 13th crop
          crop14 = nil  # Enter 14th crop
          crop15 = nil  # Enter 15th crop
          crop16 = nil  # Enter 16th crop
          crop17 = nil  # Enter 17th crop
          crop18 = nil  # Enter 18th crop
          crop19 = nil  # Enter 19th crop
          crop20 = nil  # Enter 20th crop
          on init:
```
         NextCropIndex = 1
         NextCrop = ' '
         ChooseNextCrop = 'yes'
         SummerFallowIn = 'no'
         WinterFallowIn = 'no'
         FallowIn = 'no'
```
          on start_of_day:
```
      if (ChooseNextCrop = 'yes') then
         if (NextCropIndex = 1) then
            NextCrop = '[crop1]'
         elseif (NextCropIndex = 2) then
            NextCrop = '[crop2]'
         elseif (NextCropIndex = 3) then
            NextCrop = '[crop3]'
         elseif (NextCropIndex = 4) then
            NextCrop = '[crop4]'
         elseif (NextCropIndex = 5) then
            NextCrop = '[crop5]'
         elseif (NextCropIndex = 6) then
            NextCrop = '[crop6]'
         elseif (NextCropIndex = 7) then
            NextCrop = '[crop7]'
         elseif (NextCropIndex = 8) then
            NextCrop = '[crop8]'
         elseif (NextCropIndex = 9) then
            NextCrop = '[crop9]'
         elseif (NextCropIndex = 10) then
            NextCrop = '[crop10]'
         elseif (NextCropIndex = 11) then
            NextCrop = '[crop11]'
         elseif (NextCropIndex = 12) then
            NextCrop = '[crop12]'
         elseif (NextCropIndex = 13) then
            NextCrop = '[crop13]'
         elseif (NextCropIndex = 14) then
            NextCrop = '[crop14]'
         elseif (NextCropIndex = 15) then
            NextCrop = '[crop15]'
         elseif (NextCropIndex = 16) then
            NextCrop = '[crop16]'
         elseif (NextCropIndex = 17) then
            NextCrop = '[crop17]'
         elseif (NextCropIndex = 18) then
            NextCrop = '[crop18]'
         elseif (NextCropIndex = 19) then
            NextCrop = '[crop19]'
         elseif (NextCropIndex = 20) then
            NextCrop = '[crop20]'
         endif
         if (NextCrop = 'nil' or NextCrop = ' ') then
            NextCrop = '[crop1]'
            NextCropIndex = 1
         endif
         NextCropIndex = NextCropIndex + 1
         ChooseNextCrop = 'no'
      endif
      ! if the next crop is due to be a fallow and we're within the
      ! correct date range then put a fallow in.
      if (NextCrop = '[WinterFallowName]') then
         if (paddock_is_fallow() = 1 and FallowIn = 'no') then
            if (date_within('[SummerFallowEndDate], [WinterFallowEndDate]') then
               WinterFallowIn = 'yes'
               FallowIn = 'yes'
               ChooseNextCrop = 'yes'
            endif
         endif
      elseif (NextCrop = '[SummerFallowName]') then
         if (paddock_is_fallow() = 1 and FallowIn = 'no') then
            if (date_within('[WinterFallowEndDate], [SummerFallowEndDate]') then
               SummerFallowIn = 'yes'
               FallowIn = 'yes'
               ChooseNextCrop = 'yes'
            endif
         endif
      endif

      ! if we currently have a fallow in and we're at the end of the fallow window
      ! then remove the fallow.
      if (WinterFallowIn = 'yes' and today = date('[WinterFallowEndDate]')+1) then
         WinterFallowIn = 'no'
         FallowIn = 'no'
      endif
      if (SummerFallowIn = 'yes' and today = date('[SummerFallowEndDate]')+1) then
         SummerFallowIn = 'no'
         FallowIn = 'no'
      endif
```
      maize
      soybean
      Soil Loam (Nicollet, No1): SoilType=Nicollet; Region=Story; State=Iowa; Country=US; ApsoilNumber=1; Latitude=42.049; Longitude=-93.4345; YearOfSampling=2015
        DataSource:
          Original data by http://websoilsurvey.sc.egov.usda.gov/App/HomePage.htm
          Profile developed by Integrated Cropping Systems Lab, Department of Agronomy, ISU
        Comments:
          The Nicollet series consists of very deep, somewhat poorly drained soils that formed in calcareous loamy glacial till on till plains and moraines. Slopes range from 0 to 5 percent. Mean annual air temperature is about 9 degrees C (48 degrees F). Mean annual precipitation is about 660 mm (28 inches).
          TAXONOMIC CLASS: Fine-loamy, mixed, superactive, mesic Aquic Hapludolls
          TYPICAL PEDON: Nicollet clay loam on a 2 percent plane slope in a cultivated field. (Colors are for moist soil unless otherwise stated.)
          Ap--0 to 25 cm (0 to 10 inches); black (10YR 2/1) clay loam; weak fine subangular blocky structure; friable; about 2 percent gravel; slightly acid; abrupt smooth boundary. [18 to 28 cm (7 to 12 inches thick)]
          A--25 to 43 cm (10 to 17 inches); very dark gray (10YR 3/1) clay loam; moderate fine subangular blocky structure; friable; about 5 percent gravel; common black (10YR 2/1) worm casts; slightly acid; gradual irregular boundary. [8 to 38 cm (3 to 15 inches thick)]
          Bw--43 to 53 cm (17 to 21 inches); dark grayish brown (10YR 4/2) clay loam; moderate fine subangular blocky structure; friable; common very dark gray (10YR 3/1) worm casts; about 5 percent gravel; moderately acid; clear smooth boundary.
          Bg1--53 to 74 cm (21 to 29 inches); dark grayish brown (2.5Y 4/2) clay loam; moderate fine prismatic structure parting to moderate fine subangular blocky; friable; few very dark gray (10YR 3/1) worm casts; about 5 percent gravel; common fine distinct olive brown (2.5Y 4/4) Fe concentrations; moderately acid; abrupt wavy boundary.
          Bg2--74 to 84 cm (29 to 33 inches); dark grayish brown (2.5Y 4/2) clay loam; weak medium prismatic structure parting to moderate fine and medium subangular blocky; friable; few very dark gray (10YR 3/1) worm casts; about 5 percent gravel; few fine faint grayish brown (2.5Y 5/2) Fe depletions and a few fine distinct light olive brown (2.5Y 5/4) and prominent brown (7.5YR 5/4) Fe concentrations; slightly acid; abrupt wavy boundary. [Combined thickness of the B horizon is 15 to 51 cm (6 to 20 inches.)
          BCg--84 to 91 cm (33 to 36 inches); grayish brown (2.5Y 5/2) clay loam; weak fine and medium subangular blocky structure; friable; few very dark gray (10YR 3/1) worm casts; about 5 percent gravel; many fine distinct light olive brown (2.5Y 5/4) Fe concentrations; slightly effervescent in parts; slightly alkaline; abrupt wavy boundary.[0 to 20 cm (0 to 8 inches thick) ]
          BCkg--91 to 152 cm (36 to 60 inches); grayish brown (2.5Y 5/2) loam; massive in place breaking to angular fragments with greater horizontal than vertical dimensions; friable; about 5 percent gravel; common lime masses; many fine distinct light olive brown (2.5Y 5/4) and few fine prominent yellowish brown (10YR 5/8) Fe concentrations; few black (N 2/0) Fe-Mn concretions; strongly effervescent; slightly alkaline.
        Water
          Thickness  BD    AirDry  LL15   DUL    SAT       KS
          220        1.2   0.1431  0.159  0.305  0.49717   613.656
          220        1.2   0.159   0.159  0.305  0.49717   613.656
          240        1.3   0.159   0.159  0.292  0.459434  613.656
          240        1.3   0.159   0.159  0.292  0.459434  613.656
          310        1.45  0.159   0.159  0.289  0.40283   613.656
          310        1.45  0.159   0.159  0.289  0.40283   613.656
          BD, DUL source: Field measured and checked for sensibility
          AirDry, LL15 source: Estimated based on local knowledge
          SAT source: Calculated from measured, estimated or calculated BD
          SoilCrop maize
            LL=[0.159, 0.159, 0.159, 0.159, 0.159, 0.159]
            KL=[0.08, 0.0718126, 0.0612405, 0.0517699, 0.0427795, 0.0345552]
            XF=[1, 1, 1, 1, 1, 1]
            LL source: Estimated based on local knowledge
          SoilCrop soybean: same as Maize-soybean.paddock.Loam (Nicollet, No1).Water.maize
        SoilWater: SummerCona=3.9; SummerU=8.8; SummerDate=1-jun; WinterCona=3.9; WinterU=8.8; WinterDate=1-nov; DiffusConst=40; DiffusSlope=16; Salb=0.13; CN2Bare=73; CNRed=20; CNCov=0.8; Thickness=[220, 220, 240, 240, 310, 310]
          SWCON=[0.442586, 0.442586, 0.426815, 0.426815, 0.361792, 0.361792]
        SoilOrganicMatter: RootCN=45; RootWt=1000; SoilCN=13; EnrACoeff=7.4; EnrBCoeff=0.2; OCUnits=Total
          Thickness  OC        FBiom     FInert
          220        3.19767   0.038875  0.406
          220        3.19767   0.01515   0.578
          240        0.436047  0.0106    0.76
          240        0.436047  0.01      0.8
          310        0.145349  0.01      0.8
          310        0.145349  0.01      0.8576
          OC source: Estimated based on local knowledge
        Analysis: PHUnits=Water; BoronUnits=HotWater
          Thickness  Texture  PH     CEC   ParticleSizeSand  ParticleSizeSilt  ParticleSizeClay
          220        L        5.532  20.5  38                36                26
          220        L        5.532  20.5  38                36                26
          240        L        5.532  20.5  34                37                29
          240        L        5.532  20.5  34                37                29
          310        L        6.804  20.5  37                36                27
          310        L        6.804  20.5  37                36                27
          PH source: Estimated based on local knowledge
          CEC, ParticleSizeSand, ParticleSizeSilt, ParticleSizeClay source: Measured
        InitialWater: FractionFull=1; PercentMethod=FilledFromTop
        Sample InitialNitrogen: NO3Units=kgha; NH4Units=kgha; SWUnits=Volumetric; OCUnits=Total; PHUnits=Water
          Thickness  NO3  NH4
          220        10   5
          220        7    4
          240        5    3
          240        4    2
          310        2    1
          310        1    0
        SoilTemperature: BoundaryLayerConductance=20; Thickness=[100, 200, 300, 600]; InitialSoilTemperature=[20, 22, 25, 25]
      outputfile: filename=Maize-soybean.out; title=Maize-soybean
        variables My Variables
          variables: dd/mm/yyyy as Date, sw, ave_soil_temp
        events My Variables Events: event=daily
  factorial Factorials: active=0
    settings
    factor sowing
      targets
        Target=/simulations/Maize-soybean/paddock/Manager folder/Sow on a fixed date
      vars
      manager Sow on a fixed date
        # Sowing criteria
        date = 1-may  # Enter sowing date (dd-mmm)
        # Sowing parameters
        crop = maize  # Enter name of crop to sow
        density = 7.5  # Enter sowing density (plants/m2)
        depth = 50  # Enter sowing depth (mm)
        cultivar = B_110  # Enter cultivar
        class = plant  # Enter crop growth class
        row_spacing = 760  # Enter row spacing (mm)
        on start_of_day:
        script: same as in Maize-soybean.paddock.Manager folder.Sow on a fixed date - maize
      manager Sow on a fixed date1
        # Sowing criteria
        date = 15-may  # Enter sowing date (dd-mmm)
        # Sowing parameters
        crop = maize  # Enter name of crop to sow
        density = 7.5  # Enter sowing density (plants/m2)
        depth = 50  # Enter sowing depth (mm)
        cultivar = B_110  # Enter cultivar
        class = plant  # Enter crop growth class
        row_spacing = 760  # Enter row spacing (mm)
        on start_of_day:
        script: same as in Maize-soybean.paddock.Manager folder.Sow on a fixed date - maize
      manager Sow on a fixed date2
        # Sowing criteria
        date = 20-may  # Enter sowing date (dd-mmm)
        # Sowing parameters
        crop = maize  # Enter name of crop to sow
        density = 7.5  # Enter sowing density (plants/m2)
        depth = 50  # Enter sowing depth (mm)
        cultivar = B_110  # Enter cultivar
        class = plant  # Enter crop growth class
        row_spacing = 760  # Enter row spacing (mm)
        on start_of_day:
        script: same as in Maize-soybean.paddock.Manager folder.Sow on a fixed date - maize
    factor nitrogen
      targets
        Target=/simulations/Maize-soybean/paddock/Manager folder/Fertilise on fixed date
      vars
      manager Fertilise on fixed date: same as Maize-soybean.paddock.Manager folder.Fertilise on fixed date
      manager Fertilise on fixed date1
        # When should fertiliser be applied
        fert_date = 5-may  # Enter fertiliser date (dd-mmm)
        fert_criteria = 1000  # Don't add fertiliser if N in top 2 layers exceeds (kg/ha)
        # Fertiliser application details
        fertmodule = fertiliser  # Module used to apply the fertiliser
        fert_amount = 100  # Amount of fertiliser to apply (kg/ha)
        fert_type = urea_N  # Fertiliser type
        on start_of_day:
        script: same as in Maize-soybean.paddock.Manager folder.Fertilise on fixed date
      manager Fertilise on fixed date2
        # When should fertiliser be applied
        fert_date = 5-may  # Enter fertiliser date (dd-mmm)
        fert_criteria = 1000  # Don't add fertiliser if N in top 2 layers exceeds (kg/ha)
        # Fertiliser application details
        fertmodule = fertiliser  # Module used to apply the fertiliser
        fert_amount = 50  # Amount of fertiliser to apply (kg/ha)
        fert_type = urea_N  # Fertiliser type
        on start_of_day:
        script: same as in Maize-soybean.paddock.Manager folder.Fertilise on fixed date
    factor cultivar
      targets
        Target=/simulations/Maize-soybean/paddock/Manager folder/Sow on a fixed date
      vars: cultivar=B_110, B_130
      manager Sow on a fixed date: same as Factorials.sowing.Sow on a fixed date
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